# OpenSim document version 40000
APDMDataReaderSettings:
  ExperimentalSensors:
    ExperimentalSensor Upper: name_in_model=MM_thorax
    ExperimentalSensor Middle: name_in_model=KIN_thorax
    ExperimentalSensor Lower: name_in_model=MM_humerus
    ExperimentalSensor Hand: name_in_model=KIN_humerus
